// SBML level 2 version 1

model CadherinCatenin()

  // Compartments:
  compartment compartment = 1;

  // Species:
  species $X0 in compartment = 0;
  species $w in compartment = 0;
  species Ec in compartment = 10;
  species Emem in compartment = 30;
  species beta in compartment = 20;
  species Ebeta in compartment = 60;
  species P in compartment = 0.33514;
  species C in compartment = 0;

  // Parameters:
  rhoc = 200;
  SUMac = 0;
  v = 100;
  alpha = 0;
  rhod = 200;
  SUMad = 0;
  km = 0.01;
  kplus = 100;
  kminus = 19;
  k2 = 0.03;

  // Reactions:
  v0: Ec => Emem; rhoc*SUMac*Ec;
  v1: Emem + beta => Ebeta; v*Emem*beta;
  v2: Ebeta => Ec + beta; (alpha + rhod*SUMad)*Ebeta;
  v3: $X0 => beta; km;
  v4: beta + P -> C; kplus*beta*P - kminus*C;
  v5: C => P + $w; k2*C;
end
