// SBML level 2 version 4
// Created by XMLPrettyPrinter on 11/28/2012 from

model cell()

  // Compartments:
  compartment compartment = 1;

  // Species:
  species $src in compartment = 0;
  species $waste in compartment = 0;
  species $Xo in compartment = 1;
  species $X1 in compartment = 0;
  species S1 in compartment = 0.5696949;
  species S2 in compartment = 0.2080444;
  species S3 in compartment = 0.1300277;

  // Parameters:
  k1 = 0.1;
  k_1 = 0.05;
  k2 = 0.15;
  k_2 = 0.067;
  k3 = 0.4;
  k_3 = 0.09;
  k4 = 0.55;
  k_4 = 0.01;

  // Reactions:
  J1: $Xo => S1; k1*Xo - k_1*S1;
  J2: S1 => S2; k2*S1 - k_2*S2;
  J3: S2 => S3; k3*S2 - k_3*S3;
  J4: S3 => $X1; k4*S3 - k_4*X1;
end
